# OpenSim document version 40000
MarkerSet:
  Marker S2: pelvis (-0.2038797 0.02380975 -0.0007980549)
  Marker R.PSIS: pelvis (-0.1964551 0.02848187 0.05156928)
  Marker L.PSIS: pelvis (-0.1931555 0.03722081 -0.05421151)
  Marker R.ASIS: pelvis (0.04671432 -0.0002483204 0.1266454)
  Marker L.ASIS: pelvis (0.04268538 0.0017211 -0.1287476)
  Marker R.Clavicle: torso (0.0398308 0.3782008 0.02898568)
  Marker L.Clavicle: torso (0.04427802 0.3800051 -0.02900882)
  Marker R.Shoulder: torso (-0.0279061 0.3705371 0.1854214)
  Marker L.Shoulder: torso (-0.02594913 0.3754396 -0.1928114)
  Marker R.Bicep: humerus_r (0.06756475 -0.1730471 -0.01857119)
  Marker R.Elbow: humerus_r (-0.04257995 -0.2782952 -0.01441351)
  Marker R.Forearm: ulna_r (0.02869654 -0.09631769 0.05205835)
  Marker R.Wrist: radius_r (-0.03254359 -0.2021084 0.008958041)
  Marker L.Bicep: humerus_l (0.0568093 -0.1240654 -0.009594865)
  Marker L.Elbow: humerus_l (-0.03095601 -0.2779878 0.001292872)
  Marker L.Forearm: ulna_l (0.01649226 -0.09593296 -0.05360392)
  Marker L.Wrist: radius_l (-0.01601503 -0.2040741 -0.003109847)
  Marker R.Knee: femur_r (0.001286225 -0.3667283 0.07020828)
  Marker R.TH1: femur_r (0.08474758 -0.151812 0.09406782)
  Marker R.TH2: femur_r (-0.0675359 -0.1485758 0.0739403)
  Marker R.TH3: femur_r (-0.06539024 -0.22219 0.05893795)
  Marker R.Ankle: tibia_r (-0.00849009 -0.3963453 0.0492965)
  Marker R.SH1: tibia_r (0.02820775 -0.1277577 0.08849605)
  Marker R.SH2: tibia_r (0.02799262 -0.2013005 0.07404941)
  Marker R.SH3: tibia_r (-0.08336488 -0.1179323 0.04687812)
  Marker R.SH4: tibia_r (-0.08509876 -0.1941385 0.04342239)
  Marker R.MT5: calcn_r (0.1733758 -9.999293e-5 0.06277788)
  Marker R.Heel: calcn_r (-0.02520667 0.0181488 -0.01008267) fixed=true
  Marker L.Knee: femur_l (0 -0.3700873 -0.0555131) fixed=true
  Marker L.TH1: femur_l (0.08131578 -0.1808327 -0.08920307)
  Marker L.TH2: femur_l (0.0949811 -0.2585055 -0.06534326)
  Marker L.TH3: femur_l (-0.06489041 -0.1950502 -0.06999344)
  Marker L.TH4: femur_l (-0.06087068 -0.270033 -0.05370982)
  Marker L.Ankle: tibia_l (0.002285441 -0.3874845 -0.04693865)
  Marker L.SH1: tibia_l (0.04492829 -0.08489668 -0.06780217)
  Marker L.SH2: tibia_l (-0.06553941 -0.07893007 -0.048572)
  Marker L.SH3: tibia_l (-0.07313115 -0.156263 -0.05359276)
  Marker L.Heel: calcn_l (-0.02520667 0.0181488 0.01008267) fixed=true
  Marker L.MT5: calcn_l (0.1601228 0.005182116 -0.06640016)
