# OpenSim document version 40000
Model visualize_kinematics:
  gravity: 0 -9.80665 0
  length_units: m
  force_units: N
  credits:
    Colin Smith. This model contains the femur and tibia bodies from the Lenhart 2015 model to be used to demonstrate the ability to visualize joint kinematics. The bone surface representing the subchondral bone was manually selected and copied into seperate .stl files to enable distance mapping. This model is only intended as an example and should not be used for simulations or research purposes.
  publications:
    Lenhart, R. L., Kaiser, J., Smith, C. R., & Thelen, D. G. (2015). Prediction and validation of load-dependent behavior of the tibiofemoral and patellofemoral joints during movement. Annals of biomedical engineering, 43(11), 2675-2685.
  Ground
  BodySet:
    Body femur_distal_r: mass=0.01 [kg] mass_center=(0 0 0) inertia=(0.001 0.001 0.001 0 0 0)
        meshes=lenhart2015-R-femur-bone.stl
      WrapCylinder Capsule_r: xyz_body_rotation=(-0.0299066 0.02 0.331613) translation=(-0.004 -0.003 0) quadrant=all
          radius=0.018 length=0.5
    Body tibia_proximal_r: mass=0.01 mass_center=(0 0 0) inertia=(0.001 0.001 0.001 0 0 0)
        meshes=(lenhart2015-R-tibia-bone.stl lenhart2015-R-fibula-bone.stl)
      WrapEllipsoid Med_Lig_r: xyz_body_rotation=(-0.104907 -0.0349066 0.181613) translation=(0.001 -0.0346 -0.0187)
          quadrant=all dimensions=(0.03 0.018 0.012)
  JointSet:
    CustomJoint ground_femur_distal_r: socket_parent_frame=/ground socket_child_frame=/bodyset/femur_distal_r
      Coordinate gnd_femur_rx: default_value=0 range=(-4.712389 4.712389) clamped=false
      Coordinate gnd_femur_ry: default_value=0 range=(-4.712389 4.712389) clamped=false
      Coordinate gnd_femur_rz: default_value=0 range=(-4.712389 4.712389) clamped=false
      Coordinate gnd_femur_tx: default_value=0 range=(-10 10) clamped=false
      Coordinate gnd_femur_ty: default_value=1 range=(-10 10) clamped=false
      Coordinate gnd_femur_tz: default_value=0 range=(-10 10) clamped=false
      SpatialTransform:
        TransformAxis rotation1: coordinates=gnd_femur_rx axis=(1 0 0) LinearFunction(coefficients=1 0)
        TransformAxis rotation2: coordinates=gnd_femur_ry axis=(0 1 0) LinearFunction(coefficients=1 0)
        TransformAxis rotation3: coordinates=gnd_femur_rz axis=(0 0 1) LinearFunction(coefficients=1 0)
        TransformAxis translation1: coordinates=gnd_femur_tx axis=(1 0 0) LinearFunction(coefficients=1 0)
        TransformAxis translation2: coordinates=gnd_femur_ty axis=(0 1 0) LinearFunction(coefficients=1 0)
        TransformAxis translation3: coordinates=gnd_femur_tz axis=(0 0 1) LinearFunction(coefficients=1 0)
    CustomJoint knee_r: socket_parent_frame=/bodyset/femur_distal_r socket_child_frame=/bodyset/tibia_proximal_r
      Coordinate knee_flex_r: default_value=0 range=(-0.1745329 2.792527) clamped=true
      Coordinate knee_add_r: default_value=0 range=(-0.8726646 0.8726646) clamped=true
      Coordinate knee_rot_r: default_value=0 range=(-0.8726646 0.8726646) clamped=true
      Coordinate knee_tx_r: default_value=0 range=(-0.2 0.2) clamped=true
      Coordinate knee_ty_r: default_value=0 range=(-0.2 0.2) clamped=true
      Coordinate knee_tz_r: default_value=0 range=(-0.2 0.2) clamped=true
      SpatialTransform:
        TransformAxis rotation1: coordinates=knee_flex_r axis=(0 0 1) LinearFunction(coefficients=-1 0)
        TransformAxis rotation2: coordinates=knee_add_r axis=(1 0 0) LinearFunction(coefficients=1 0)
        TransformAxis rotation3: coordinates=knee_rot_r axis=(0 1 0) LinearFunction(coefficients=1 0)
        TransformAxis translation1: coordinates=knee_tx_r axis=(1 0 0) LinearFunction(coefficients=1 0)
        TransformAxis translation2: coordinates=knee_ty_r axis=(0 1 0) LinearFunction(coefficients=1 0)
        TransformAxis translation3: coordinates=knee_tz_r axis=(0 0 1) LinearFunction(coefficients=1 0)
  ForceSet:
    Blankevoort1991Ligament MCL1: linear_stiffness=1000 slack_length=0.05
      PathPoint MCLs1-P1: femur_distal_r (0.005225407 0.0083394 -0.04065)
      PathPoint MCLs1-P2: tibia_proximal_r (0.007686794 -0.061131 -0.01907174)
      PathWrap pathwrap_: wrap_object=Med_Lig_r method=hybrid
    Blankevoort1991Ligament MCL2: linear_stiffness=1000 slack_length=0.05
      PathPoint MCLs2-P1: femur_distal_r (0.01151367 0.007228694 -0.040595)
      PathPoint MCLs2-P2: tibia_proximal_r (0.01498915 -0.06185011 -0.01535507)
      PathWrap pathwrap_: wrap_object=Med_Lig_r method=hybrid
    Blankevoort1991Ligament MCL3: linear_stiffness=1000 slack_length=0.05
      PathPoint MCLs3-P1: femur_distal_r (-0.00040512 0.007266833 -0.038878)
      PathPoint MCLs3-P2: tibia_proximal_r (0.0011834 -0.06195035 -0.01879429)
      PathWrap pathwrap_: wrap_object=Med_Lig_r method=hybrid
    Smith2018ArticularContactForce tf_contact: socket_target_mesh=/contactgeometryset/femur_cartilage
        socket_casting_mesh=/contactgeometryset/tibia_cartilage min_proximity=-0.01 max_proximity=0.01
        elastic_foundation_formulation=linear use_lumped_contact_model=true
      # Combine the thickness and average material properties between the ContactParams for both meshes and use Bei & Fregly 2003 lumped parameter Elastic Foundation model
      ContactParameters target_mesh_contact_params: elastic_modulus=1 poissons_ratio=0.5 thickness=0.005
          use_variable_thickness=false
      ContactParameters casting_mesh_contact_params: elastic_modulus=1 poissons_ratio=0.5 thickness=0.005
          use_variable_thickness=false
  ContactGeometrySet:
    Smith2018ContactMesh femur_cartilage: socket_frame=/bodyset/femur_distal_r location=(0 0 0)
        socket_scale_frame=/bodyset/femur_distal_r mesh_file=lenhart2015-R-femur-subchondral-bone.stl
        min_thickness=0.001 [m] max_thickness=0.01 [m] scale_factors=(1 1 1)
    Smith2018ContactMesh tibia_cartilage: socket_frame=/bodyset/tibia_proximal_r location=(0 0 0)
        socket_scale_frame=/bodyset/femur_distal_r mesh_file=lenhart2015-R-tibia-subchondral-bone.stl
        min_thickness=0.001 max_thickness=0.01 scale_factors=(1 1 1)
